// SBML level 2 version 4
// dcterms:bibliographicCitation: urn:miriam:doi:10.1016/j.cnsns.2016.10.007

function Rate_Law_for_Water_contamination_through_I(c, H)
  c*H;
end

function Rate_Law_for_Environment_Human_Transmission(k, S, B, k1)
  k*S*B/(k1 + B);
end
Rate_Law_for_Environment_Human_Transmission is "Rate Law for Environment-Human Transmission";

model Cholera()
  // Model Source:
  // Gui-Quan Sun, Jun-Hui Xie, Sheng-He Huang, Zhen Jin, Ming-Tao Li, andLiqun Liu. Transmission dynamics of cholera: Mathematical modeling andcontrol strategies.Communications in Nonlinear Science and NumericalSimulation, 45:235–244, 2017.
  // Units of vibrios in Water: number of bacterial cells
  // Units of health states in Population: number of individuals
  // Parameters given for China.
  // Figures 5 and 6 reproduced.
  // isDescribedBy doi:10.1016/j.cnsns.2016.10.007

  // Compartments:
  // Compartment with human populations health states.
  compartment Population = 1;  // 0-D
  // Compartment for bacterial vibrios in water
  compartment Water = 1;

  // Species:
  // Number of individals susceptible to infection
  species S in Population = N - I;
  // Number of infected individuals
  species I in Population = 28;
  // Number of recovered individuals
  species R in Population = 0;
  // Concentration of vibrios in water.
  // Initial condition is assumed to match the parameter 'k'.
  species B in Water = k;
  // Total number of humans in the system
  species $N in Population = 1360000000;

  // Parameters:
  // Natural death rate for humans (per capita)
  mu = 0.0066 unit_0;
  // Transmission coefficient for human-human transmission
  beta_e = 2.6699e-6 unit_0;
  // Transmission coefficient for environment-human transmission
  beta_h = 5.3508e-9 unit_1;
  // Half saturation constant for the infectiousness of contaminated water.
  // Unit: Concentration of vibrios in the environment (here, water)
  k = 500 unit_2;
  // Natural recovery rate of humans from cholera infection
  gamma = 73 unit_0;
  // Natural decay rate of vibrios in water
  delta = 12.1667 unit_0;
  // Rate of human contribution to Vibrio Cholerae
  xi = 3650 unit_3;
  // Disinfection rate
  c = 0 unit_0;
  // Vaccination rate in humans
  nu = 0.3102 unit_0;
  // Total birth rate
  lambda = 8976000 unit_4;

  // Reactions:
  // Transmission of the disease to individuals due to contact with contaminated water
  Environment_Human_Transmission: S => I; Population*Rate_Law_for_Environment_Human_Transmission(beta_e, S, B, k); Environment_Human_Transmission is "Environment-Human Transmission";  // modifiers: B
  // Transmission of the disease to individuals upon contact with an infectious person
  Human_Human_Transmission: S + I => 2 I; Population*beta_h*S*I; Human_Human_Transmission is "Human-Human Transmission";
  // Addition of individuals to the system by birth.
  // Assumption: All newborns are initially susceptible to the disease
  Birth: $N => S; Population*mu*N;
  // Natural death of susceptible individuals
  Death_S: S => ; Population*mu*S;
  // Natural death of infected individuals
  Death_I: I => ; Population*mu*I;
  // Natural death of recoverd individuals
  Death_R: R => ; Population*mu*R;
  // Natural recovery from the disease
  Recovery: I => R; Population*gamma*I;
  // Vaccination of individuals.
  // Assumption: Vaccine is 100% effective and the immunity is permanent
  Vaccination: S => R; Population*nu*S;
  // Natural decay of bateria in water
  Bacterial_decay_in_water: B => ; Water*delta*B;
  // Contamination of water due to an infectious person comong in contact with it
  Water_contamination_through_I: => B; Water*Rate_Law_for_Water_contamination_through_I(xi, I);  // modifiers: I
  // Reduction of bacterial concentration in water through disinfection
  Disinfection_of_water: B => ; Water*c*B;

  // Unit definitions:
  unit length = metre;
  unit area = metre^2;
  unit volume = 1e-3 litre;
  unit time = second;
  unit substance = item;
  unit unit_0 = (3.1536e7 dimensionless)^0 / second; unit_0 is "1/(1*y)";
  unit unit_1 = (3.1536e7 dimensionless)^0 / (second * item); unit_1 is "1/(#*y)";
  unit unit_2 = item / (1e-3 litre); unit_2 is "#/ml";
  unit unit_3 = (3.1536e7 dimensionless)^0 / (second * 1e-3 litre); unit_3 is "1/(ml*y)";
  unit unit_4 = (3.1536e7 dimensionless)^0 / second; unit_4 is "1/y";
end
