// SBML level 2 version 4
// dcterms:bibliographicCitation: urn:miriam:doi:https://doi.org/10.1155/2019/8465747

function Constant_flux__irreversible(v)
  v;
end
Constant_flux__irreversible is "Constant flux (irreversible)";

function Shedding(k, I)
  k*I;
end

function Logistic_Incidence(k1, S, I, k2)
  k1*S*I/(k2 + I);
end

function Infection_transmission(k, S, I, N)
  k*S*I/N;
end

model Dysentry()
  // Source: Berhe, Hailay Weldegiorgis, Oluwole Daniel Makinde, and David Mwangi Theuri. "Parameter estimation and sensitivity analysis of dysentery diarrhea epidemic model." Journal of Applied Mathematics 2019 (2019).
  // Figure 4(a) reproduced with updated estimated alpha, gamma and K (assuming all other correspond to paper's reported parameter values in Fig 5 caption. Check the parameter sets for the differences.
  // Run parameter estimation for Best-fit plot (Figure 4).
  // Run Time Course for time course simulation
  // isDescribedBy https://doi.org/10.1155/2019/8465747

  // Compartments:
  // Number of humans
  compartment Humans = 1;  // 0-D
  // Bacteria in water
  compartment Water = 1;  // 0-D

  // Species:
  // Susceptible individuals
  species S in Humans = 216253;
  // Infectious individuals
  species I in Humans = 4500;
  // Recovered individuals
  species R in Humans = 165;
  // Bacterial load in water
  species B in Water = 1356;
  // Total human population
  species $N in Humans;

  // Parameters:
  // Total birth rate
  Lambda = 462;
  // Natural mortality rate (per capita)
  mu = 0.000457;
  // Rate of waning immunity of recovered individuals
  alpha = 0.1405032;
  // Recovery rate
  gamma = 0.1236587;
  // Disease induced mortality rate
  d = 0.517443;
  // Transmission coefficient of infectious individual
  beta_h = 0.69864;
  // Transmission coefficient of contaminated water
  beta_B = 0.04465;
  // Bacterial shedding rate of infectious individual
  epsilon = 0.01;
  // Rate of bacterial decay in water
  sigma = 46.2086;
  // Half saturation constant of bacteria in water
  K = 28158;

  // Assignment rules:
  N := S*Humans + I*Humans + R*Humans;

  // Reactions:
  // Natural birth of individuals as susceptible
  Birth: => S; Humans*Constant_flux__irreversible(Lambda);
  // Natural mortality of suceptible individuals
  Death_S: S => ; Humans*mu*S;
  // Natural mortality of recovered individuals
  Death_R: R => ; Humans*mu*R;
  // Natural mortality of infectious individuals
  Death_I: I => ; Humans*mu*I;
  // Recovery of infectious infividual
  Recovery: I => R; Humans*gamma*I;
  // Waning of temporary immunity due to infection
  Waning_immunity: R => S; Humans*alpha*R;
  // Disease induced death of infectious individuals
  Disease_induced_death: I => ; Humans*d*I;
  // Infection transmission to a susceptible upon coming in contact with infectious individual(s)
  Human_Human_Transmission: S => I; Humans*Infection_transmission(beta_h, S, I, N); Human_Human_Transmission is "Human-Human Transmission";  // modifiers: N
  Water_Human_Transmission: S => I; Logistic_Incidence(beta_B, S, B, K); Water_Human_Transmission is "Water-Human Transmission";  // modifiers: B
  Bacterial_shedding_by_I: => B; Shedding(epsilon, I);  // modifiers: I
  // Natural (exponential) decay of bacteria
  Bacterial_decay: B => ; Water*sigma*B;

  // Unit definitions:
  unit length = metre;
  unit area = metre^2;
  unit volume = litre;
  unit time = second;
  unit substance = item;
end
